*Heading
** Job name: Job-2 Model name: Model-1
** Generated by: Abaqus/CAE 2020
*Preprint, echo=NO, model=NO, history=NO, contact=NO
**
** PARTS
**
*Part, name=Part-1
*Node
      1,           0.,          3.5
      2,           0.,           4.
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*Element, type=CPS4R
   1,    1,   28, 1249,  243
   2,   28,   29, 1250, 1249
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*Nset, nset=Set-1
    1,    2,    3,    4,    5,    6
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*Elset, elset=Set-1, generate
    1,  2548,     1
*Nset, nset=Set-2
    5,    6,    7,   10,   11,   12
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*Elset, elset=Set-2, generate
 2549,  6370,     1
*Nset, nset=Set-3
   17,   21,   22,   23,   26,   27
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*Elset, elset=Set-3, generate
 6371,  7644,     1
** Section: Section-1
*Solid Section, elset=Set-1, material=e200
1.,
** Section: Section-1
*Solid Section, elset=Set-2, material=e200
1.,
** Section: Section-1
*Solid Section, elset=Set-3, material=e200
1.,
*End Part
**
**
** ASSEMBLY
**
*Assembly, name=Assembly
**
*Instance, name=Part-1-1, part=Part-1
*End Instance
**
*Nset, nset=Set-1, instance=Part-1-1
  1,  2, 28, 29, 30, 31, 32, 33, 34, 35, 36, 37, 38, 39
*Elset, elset=Set-1, instance=Part-1-1
    1,    2,    3,    4,    5,    6
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*Nset, nset=Set-2, instance=Part-1-1
  22,  23, 853, 854, 855, 856, 857, 858, 859, 860, 861, 862, 863, 864
*Elset, elset=Set-2, instance=Part-1-1
 5097, 5098, 5099, 5100, 5101, 5102
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*Nset, nset=Set-3, instance=Part-1-1
 23,
*Nset, nset=Set-4, instance=Part-1-1
 1,
*Elset, elset=_Surf-3_S2, internal, instance=Part-1-1
   13,   26,   39,   52,   65,   78
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*Elset, elset=_Surf-3_S4, internal, instance=Part-1-1
 1275, 1288, 1301, 1314, 1327, 1340
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*Surface, type=ELEMENT, name=Surf-3
_Surf-3_S2, S2
_Surf-3_S4, S4
*Elset, elset=_Surf-6_S2, internal, instance=Part-1-1, generate
 2873,  3497,    13
*Elset, elset=_Surf-6_S4, internal, instance=Part-1-1, generate
 4148,  4772,    13
*Surface, type=ELEMENT, name=Surf-6
_Surf-6_S2, S2
_Surf-6_S4, S4
*Elset, elset=_Surf-7_S2, internal, instance=Part-1-1
 2561, 2574, 2587, 2600, 2613, 2626
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*Elset, elset=_Surf-7_S4, internal, instance=Part-1-1
 3823, 3836, 3849, 3862, 3875, 3888
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*Surface, type=ELEMENT, name=Surf-7
_Surf-7_S2, S2
_Surf-7_S4, S4
*Elset, elset=_Surf-8_S2, internal, instance=Part-1-1
  650,  663,  676,  689,  702,  715
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*Elset, elset=_Surf-8_S4, internal, instance=Part-1-1
 1912, 1925, 1938, 1951, 1964, 1977
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*Surface, type=ELEMENT, name=Surf-8
_Surf-8_S2, S2
_Surf-8_S4, S4
*End Assembly
**
** MATERIALS
**
*Material, name=e200
*Elastic
200000., 0.3
**
** BOUNDARY CONDITIONS
**
** Name: BC-1 Type: Displacement/Rotation
*Boundary
Set-3, 1, 1
Set-3, 2, 2
** Name: BC-2 Type: Displacement/Rotation
*Boundary
Set-4, 1, 1
** ----------------------------------------------------------------
**
** STEP: Step-1
**
*Step, name=Step-1, nlgeom=NO
*Static
1., 1., 1e-05, 1.
**
** LOADS
**
** Name: Load-1   Type: Pressure
*Dsload
Surf-3, P, 16.
** Name: Load-2   Type: Pressure
*Dsload
Surf-6, P, 8.
** Name: Load-3   Type: Pressure
*Dsload
Surf-7, P, 10.
** Name: Load-4   Type: Pressure
*Dsload
Surf-8, P, 12.
**
** OUTPUT REQUESTS
**
*Restart, write, frequency=0
**
** FIELD OUTPUT: F-Output-1
**
*Output, field, variable=PRESELECT
**
** HISTORY OUTPUT: H-Output-1
**
*Output, history, variable=PRESELECT
*End Step
